units real
atom_style full

dimension 3
boundary p p p

bond_style hybrid harmonic
angle_style hybrid harmonic
dihedral_style hybrid charmm multi/harmonic
special_bonds lj 0.0 0.0 0.5 coul 0.0 0.0 0.833333

read_data CBC-G4_converted.lmp

pair_style lj/cut/coul/long 15.0 15.0
pair_modify tail yes
kspace_style pppm 1.0e-8
pair_coeff 1 1   0.1094001   3.3996700
pair_coeff 2 2   0.1700000   3.2500000
pair_coeff 3 3   0.0860000   3.3996700
pair_coeff 4 4   0.2100000   2.9599200
pair_coeff 5 5   0.0860000   3.3996700
pair_coeff 6 6   0.1700000   3.0000100
pair_coeff 7 7   0.2500000   3.5635900
pair_coeff 8 8   0.0157000   2.2931700
pair_coeff 9 9   0.0157000   2.4713500
pair_coeff 10 10   0.0150000   2.5996400
pair_coeff 11 11   0.0157000   2.6495300
pair_coeff 12 12   0.1700000   3.2500000
pair_coeff 13 13   0.1700000   3.2500000
pair_coeff 14 14   0.0157000   1.0690800
pair_coeff 15 15   0.0874393   2.4392800
pair_coeff 16 16   0.1520000   3.1507500
pair_coeff 17 17   0.0000000   0.0000000

pair_modify mix arithmetic

fix settle all shake 0.000001 100 0 t 16 17 a 329 330 331 332 333 334 335 336 337 338 &
 339 340 341 342 343 344 345 346 347 348 &
 349 350 351 352 353 354 355 356 357 358 &
 359 360 361 362 363 364 365 366 367 368 &
 369 370 371 372 373 374 375 376 377 378 &
 379 380 381 382 383 384 385 386 387 388 &
 389 390 391 392 393 394 395 396 397 398 &
 399 400 401 402 403 404 405 406 407 408 &
 409 410 411 412 413 414 415 416 417 418 &
 419 420 421 422 423 424 425 426 427 428 &
 429 430 431 432 433 434 435 436 437 438 &
 439 440 441 442 443 444 445 446 447 448 &
 449 450 451 452 453 454 455 456 457 458 &
 459 460 461 462 463 464 465 466 467 468 &
 469 470 471 472 473 474 475 476 477 478 &
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 2419 2420 2421 2422 2423 2424 2425 2426 2427 2428 &

thermo_style custom ebond eangle edihed eimp epair evdwl ecoul elong etail pe

run 0
