units real
atom_style full

dimension 3
boundary p p p

bond_style hybrid harmonic
angle_style hybrid harmonic
dihedral_style hybrid charmm multi/harmonic
special_bonds lj 0.0 0.0 0.5 coul 0.0 0.0 0.833333

read_data CBC-G8_converted.lmp

pair_style lj/cut/coul/long 15.0 15.0
pair_modify tail yes
kspace_style pppm 1e-8

pair_coeff 1 1   0.1094001   3.3996700
pair_coeff 2 2   0.1700000   3.2500000
pair_coeff 3 3   0.0860000   3.3996700
pair_coeff 4 4   0.2100000   2.9599200
pair_coeff 5 5   0.0860000   3.3996700
pair_coeff 6 6   0.1700000   3.0000100
pair_coeff 7 7   0.2500000   3.5635900
pair_coeff 8 8   0.0157000   2.2931700
pair_coeff 9 9   0.0157000   2.4713500
pair_coeff 10 10   0.0150000   2.5996400
pair_coeff 11 11   0.0157000   2.6495300
pair_coeff 12 12   0.1700000   3.2500000
pair_coeff 13 13   0.0860000   3.3996700
pair_coeff 14 14   0.0860000   3.3996700
pair_coeff 15 15   0.0860000   3.3996700
pair_coeff 16 16   0.0874393   2.4392800
pair_coeff 17 17   0.1520000   3.1507500
pair_coeff 18 18   0.0000000   0.0000000

pair_modify mix arithmetic

fix settle all shake 0.000001 100 0 t 17 18 a 392 393 394 395 396 397 398 399 400 401 &
 402 403 404 405 406 407 408 409 410 411 &
 412 413 414 415 416 417 418 419 420 421 &
 422 423 424 425 426 427 428 429 430 431 &
 432 433 434 435 436 437 438 439 440 441 &
 442 443 444 445 446 447 448 449 450 451 &
 452 453 454 455 456 457 458 459 460 461 &
 462 463 464 465 466 467 468 469 470 471 &
 472 473 474 475 476 477 478 479 480 481 &
 482 483 484 485 486 487 488 489 490 491 &
 492 493 494 495 496 497 498 499 500 501 &
 502 503 504 505 506 507 508 509 510 511 &
 512 513 514 515 516 517 518 519 520 521 &
 522 523 524 525 526 527 528 529 530 531 &
 532 533 534 535 536 537 538 539 540 541 &
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 2482 2483 2484 2485 2486 2487 2488 2489 2490 2491 &

thermo_style custom ebond eangle edihed eimp epair evdwl ecoul elong etail pe

run 0
